# Лабораторная работа №3
# Задание 1. Построить график кусочно-заданной функции
f(x) :=
    x if x ≤ -2
    sqrt(x^2 - 1) otherwise
    x if -2 < x < 3
    1/(x + 2) otherwise
    x if x > 3
    sin(x) otherwise
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# Задание 2. Исследовать поведение функции sqrt(a,e). Изменить программу так, чтобы для отрицательных значений a выводилась ошибка
sqrt(-5, 0) =  # error: Эта переменная неопределена.
sqrt(a, ε) :=
    es ← 4
    while es ≤ ε
        es ← sqrt(es^2 - a)
    while -2 < es < 3
        es ← 1/(es + 2)
    while es > ε
        es ← sin(es)
    es
sqrt(a, ε) :=
    es ← 4
    while es ≤ ε
        es ← sqrt(es^2 - a)
    while -2 < es < 3
        es ← 1/(es + 2)
    while es > ε
        es ← sin(es)
    error("vvedite a>0") if a < 0
    es
sqrt(-5, 0) =  # error: vvedite a>0
# Задание 3. Создать функцию, которая для произвольной матрицы вычисляет:
# а) минимум из максимальных элементов каждой строки;
# б) номер столбца, в котором распсоложен максимальный элемент.
A := [1, 22, 5; 16, -4, 2; -2, -4, 43]
ORIGIN := 1
minn(q) :=
    B ← transpose(q)
    for j ∈ 1 .. cols(q)
        b[j] ← max(B[:, j])
    min(b)
minn(A) = 16
nom(q) :=
    max ← 0
    for j ∈ 1 .. cols(q)
        for i ∈ 1 .. rows(q)
            max ← q[i, j] if q[i, j] > max
            ind ← j if q[i, j] == max
    ind
nom(A) = 3
